# Title: Planilha de Controle do Conversor Boost PFC Monofásico
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# INSTITUTO DE ELETRÔNICA DE POTÊNCIA
# Projeto MLMSR 2014
# INVERSORES uGRID
# Descrição: Planilha de projeto
# Resp. Dr. Eng. Márcio S. Ortmann
_____________________________________________________________  # 2014
# FUNÇÕES:
# [reference: functions.xmcd]
# DADOS:
# COMPONENTES PASSIVOS:
Vg_rms := sqrt(3)*110*V  # Tensão eficaz
Po := 2500 W  # Potência do sistema
Vo := 380 V  # Tensão nominal do Barramento CC
fsw := 333*60*Hz  # Frequência de comutação
fsmp := 2*fsw  # Frequência de amostragem
fg := 60  # Frequência da rede
FCLK := 150*10^6*Hz  # Frequência do Clock do DSP
# Cálculos preliminares
s(f) := 2*π*1i*f
ωg := 2*π*fg
_______________________________________________________________________________________
fs1 := 1*fsw
Timer := round(FCLK/fs1)
Timer = 7508
VT := Timer
fsxx := FCLK/Timer
fsxx = 19978.7 1/s  # Frequência de amostrgem real
ts := 1/fsmp
m := 2*fsmp/(1 Hz)
fsmp = 39960 1/s
ω(s) := -(s + m)/(s - m)
ω(s) := e^(ts*s)
# [component: outputs mode]
PL := 3000
## Carga:
RL := 110^2*3/PL = 12.1
ZL(s) := RL
## Rede
Lg := 50*10^-6
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Rg := 0.005
Zg(s) := (Rg + s*Lg)*mode + (1 - mode)*1*10^6
Z1(s) := Zi(s) + ZL(s)
## Filtro:
Zfc(s) := 1/(s*Cf)*((s*Cfd*Rfd + 1)/(s*Cfd))/(1/(s*Cf) + ((s*Cfd*Rfd + 1)/(s*Cfd)))
Li1 := 460*10^-6
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Ri1 := 0.01
Z2(s) := Z1(s)*Zfc(s)/(Z1(s) + Zfc(s))
Li2 := 230*10^-6
Ri2 := 0.01
Z3(s) := Z2(s) + Zi(s)  # Impedância vista pelo conversor
Cf := 4*10^-6
# Função de transferência de controle de tensão nos capacitores
Cfd := 2*10^-6
VoVi(s) := Z2(s)/(Zi(s) + Z2(s))
Rfd := 12
Zi1(s) := Ri1 + s*Li1
Zi2(s) := Ri2 + s*Li2
Zfc(s) := 1/(s*Cf)*((s*Cfd*Rfd + 1)/(s*Cfd))/(1/(s*Cf) + ((s*Cfd*Rfd + 1)/(s*Cfd)))
Z1(s) := Zg(s)*ZL(s)/(Zg(s) + ZL(s)) + Zi2(s)
Z2(s) := Z1(s)*Zfc(s)/(Z1(s) + Zfc(s))
Z3(s) := Z1(s) + Z2(s)  # Impedância vista pelo conversor
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# Função de transferência de controle direto de tensão nos capacitores
# Função de transferência de controle direto de tensão nos capacitores
VoVi(s) := Z2(s)/(Zi1(s) + Z2(s))
ii1Vi(s) := 1/Z3(s)
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# CONTROLE DAS CORRENTES:
Ts := 1/(666*60) = 2.5025e-5
fs := 1/Ts = 39960
PWM(s) := e^(-s*3*Ts/2)
# Função de Transferência da Realimentação:
# (Inclui o filtro antialiaisng e o filtro passa alta digital de primeira ordem)
fpci := 20000
ωpci := 2*π*fpci
Hi(s) := (1/(s/ωpci + 1))*(1 - 1/(s/ωphp + 1))
fphp := 1000
ωphp := 2*π*fphp
Hi(s) := (1/(s/ωpci + 1))
LPF1_CTES := LPF1_C2D("LPF1", "Coeficientes para filtro passa baixa de ordem 1 para correntes", 1, 1000, fsmp/Hz)
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# Controlador de corrente
Kip := 3
K_fpf1i := 40
fr1i := 60
fc1i := 10
ωc_fpfres := 2*π*3000
ω_cut1i := 2*π*fc1i
Ci(s) := Kip*((s^2 + ωc_fpfres^2)/(s^2 + 2*ω_cutres*s + ωc_fpfres^2))
ω_cutres := 2*π*2000
ωc_fpf1i := 2*π*fr1i
KPI_I := 2
WZ_I := 2*π*100
Ci(s) := KPI_I*(s + 2*π*WZ_I)/s
Ci(s) := Kip + (2*K_fpf1i*ω_cut1i*s/(s^2 + 2*ω_cut1i*s + ωc_fpf1i^2))
PI_C2D(CTE_ID, desc, Kp, fz1, max, min, fs)
PR1i_CTES := PR_C2D("PR1i", "Coeficientes para controlador PR1 ", Kip, K_fpf1i, fr1i, fc1i, 1/32, fsmp/Hz)
Vi_iref(s) := Ci(s)*PWM(s)/(1 + Hi(s)*Ci(s)*PWM(s)/Z3(s))
PIAC_CTES := PI_C2D("PIAC", "Coeficientes para controlador PI ", KPI_I, 1000, 1000, -1000, fsmp/Hz)
BRF_CTES := BRF_C2D("P_BRF", "Controlador de Corrente Proporcional + BRF", 4, 4200, 2000, 1/32, fsmp/Hz)
Vo_iref(s) := VoVi(s)*Vi_iref(s)
Vo_pwm(s) := VoVi(s)*PWM(s)
FTLAi(s) := Ci(s)*PWM(s)*1/Z3(s)*Hi(s)
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# CONTROLADOR PARA TENSÃO AC:
# Projeto da Malha de Tensão:
# Filtros Passa Faixa:
fc1 := 60
fc5 := 300
fc7 := 420
fc11 := 660
fc13 := 13*60
K_fpf1 := 60
K_fpf5 := 30
K_fpf7 := 30
K_fpf11 := 30
K_fpf13 := 30
ωc_fpf1 := 2*π*fc1
ωc_fpf5 := 2*π*fc5
ωc_fpf7 := 2*π*fc7
ωc_fpf11 := 2*π*fc11
ωc_fpf13 := 2*π*fc13
ω_cut1 := 2*2*π
ω_cut5 := 2*2*π
ω_cut7 := 2*2*π
ω_cut11 := 2*2*π
ω_cut13 := 2*2*π
# Entre com os campos:  PR_C2D(CTE_ID, desc, Kp, Kr, fr, fcut, Δ, fs)
Cvp(s) := 0.2 + (2*K_fpf1*ω_cut1*s/(s^2 + 2*ω_cut1*s + ωc_fpf1^2)) + 2*K_fpf5*ω_cut5*s/(s^2 + 2*ω_cut5*s + ωc_fpf5^2) + 2*K_fpf7*ω_cut7*s/(s^2 + 2*ω_cut7*s + ωc_fpf7^2) + 2*K_fpf11*ω_cut11*s/(s^2 + 2*ω_cut11*s + ωc_fpf11^2) + 2*K_fpf13*ω_cut13*s/(s^2 + 2*ω_cut13*s + ωc_fpf13^2)
Cv(s) := (s + 2*π*3000)/s*0.2 + (2*K_fpf1*ω_cut1*s/(s^2 + 2*ω_cut1*s + ωc_fpf1^2)) + 2*K_fpf5*ω_cut5*s/(s^2 + 2*ω_cut5*s + ωc_fpf5^2) + 2*K_fpf7*ω_cut7*s/(s^2 + 2*ω_cut7*s + ωc_fpf7^2) + 2*K_fpf11*ω_cut11*s/(s^2 + 2*ω_cut11*s + ωc_fpf11^2) + 2*K_fpf13*ω_cut13*s/(s^2 + 2*ω_cut13*s + ωc_fpf13^2)
Cv1(s) := (s + 2*π*5000)/(s + 2*π*100)*0.1 + (2*K_fpf1*ω_cut1*s/(s^2 + 2*ω_cut1*s + ωc_fpf1^2)) + 2*K_fpf5*ω_cut5*s/(s^2 + 2*ω_cut5*s + ωc_fpf5^2) + 2*K_fpf7*ω_cut7*s/(s^2 + 2*ω_cut7*s + ωc_fpf7^2) + 2*K_fpf11*ω_cut11*s/(s^2 + 2*ω_cut11*s + ωc_fpf11^2) + 2*K_fpf13*ω_cut13*s/(s^2 + 2*ω_cut13*s + ωc_fpf13^2)
# Teste com PID
# Teste com AV-AT
ω_cutres := 2*π*1000
Cv2(s) := 0.3*(s + 2*π*6000)*(s + 2*π*6000)/((s + 2*π*10)*(s + 2*π*10000)) + (2*K_fpf1*ω_cut1*s/(s^2 + 2*ω_cut1*s + ωc_fpf1^2)) + 2*K_fpf5*ω_cut5*s/(s^2 + 2*ω_cut5*s + ωc_fpf5^2) + 2*K_fpf7*ω_cut7*s/(s^2 + 2*ω_cut7*s + ωc_fpf7^2) + 2*K_fpf11*ω_cut11*s/(s^2 + 2*ω_cut11*s + ωc_fpf11^2) + 2*K_fpf13*ω_cut13*s/(s^2 + 2*ω_cut13*s + ωc_fpf13^2)
ωc_fpfres := 2*π*8000
Cv3(s) := 1.0*(s + 2*π*5000)*(s + 2*π*5000)/((s + 2*π*10)*(s + 2*π*15000)) + (2*K_fpf1*ω_cut1*s/(s^2 + 2*ω_cut1*s + ωc_fpf1^2)) + 2*K_fpf5*ω_cut5*s/(s^2 + 2*ω_cut5*s + ωc_fpf5^2) + 2*K_fpf7*ω_cut7*s/(s^2 + 2*ω_cut7*s + ωc_fpf7^2) + 2*K_fpf11*ω_cut11*s/(s^2 + 2*ω_cut11*s + ωc_fpf11^2) + 2*K_fpf13*ω_cut13*s/(s^2 + 2*ω_cut13*s + ωc_fpf13^2) - 1*((s^2 + ωc_fpfres^2)/(s^2 + 2*ω_cutres*s + ωc_fpfres^2))
# Teste com notch na ressonância
FTLAvp(s) := Cvp(s)*Vo_iref(s)*1/Kip
|Cvp(s(60))| = 60.2005
FTLAv(s) := Cv(s)*Vo_iref(s)*1/Kip
|Cv(s(60))| = 61.0002
AVAT_CTES := GTF2_C2D("AVAT_VAC", "Coeficientes para controlador AVAT para vac", 0.3, 6000, 6000, 10, 15000, fsmp/Hz)
FTLAv1(s) := Cv1(s)*Vo_iref(s)*1/Kip
|Cv1(s(60))| = 63.7349
CV1_CTES := GTF1_C2D("CVAC", "Coeficientes para controlador 1P1Z", 0.1, 100, 5000, fsmp/Hz)
FTLAv2(s) := Cv2(s)*Vo_iref(s)*1/Kip
|Cv2(s(60))| = 65.4956
PI1_CTES := PI_C2D("PIVAC", "Coeficientes para controlador PI ", 0.4, 3000, 1000, -1000, fsmp/Hz)
FTLAv3(s) := Cv3(s)*Vo_iref(s)*1/Kip
|Cv3(s(60))| = 69.4185
PR1_CTES := PR_C2D("PR1", "Coeficientes para controlador PR1 ", 0, K_fpf1, fc1, 2, 1/32, fsmp/Hz)
FTLAvt(s) := Cv(s)*Vo_pwm(s)
PR5_CTES := PR_C2D("PR5", "Coeficientes para controlador PR5 ", 0, K_fpf5, fc5, 2, 1/32, fsmp/Hz)
PR7_CTES := PR_C2D("PR7", "Coeficientes para controlador PR7 ", 0, K_fpf7, fc7, 2, 1/32, fsmp/Hz)
PR11_CTES := PR_C2D("PR11", "Coeficientes para controlador PR11 ", 0, K_fpf11, fc11, 2, 1/32, fsmp/Hz)
PR13_CTES := PR_C2D("PR13", "Coeficientes para controlador PR13 ", 0, K_fpf13, fc13, 2, 1/32, fsmp/Hz)
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# Filtro passa baixa para medições
LPF20_CTES := LPF2_C2D("LPF20", "Filtro passa baixa fc=60Hz", 1, 100, 0.7, fsmp/Hz)
# IMPEDÂNCIA VIRTUAL
# Será realizada através do deslocamento dos sinais de alfa e veta através de filtros sintonizados baseados no modo senoidal. O valor do ganho ressonante refere-se à reatância indutiva, que pode ser aproximada pelo valor da reatância na frequência fundamental. Um sinal negativo é adicionado ao ganho ressonante, de forma a se obter o deslocametno de fase de  -270º = 90 º. Por outro lado, o ganho proporcional refere-se à parcela resistiva.
Z_res := 0
Z_imag := 2*π*60*0.002 = 0.753982
Zp := Z_res
Zr := -Z_imag
Zwcut := 2*π*40
Zwr := 2*π*60
Z_PRS(s) := Zp + Zr*2*(Zwcut*Zwr)/(s^2 + 2*s*Zwcut + Zwr^2)
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# Conferindo:
fop := 60
|Z_PRS(s(fop))|*cos(arg(Z_PRS(s(fop)))) = 4.61666e-17
|Z_PRS(s(fop))|*sin(arg(Z_PRS(s(fop)))) = 0.753982
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b2, b1, b0, a2, a1, a0, 1/32, fsmp/Hz
PRS_ZV_CTES := PRS_C2D("PRS_ZV", "Filtro passa faixa para impedância virtual", Zp, Zr, 60, 10, 1/32, fsmp/Hz)
PRS_ZV_CTES := FT2GD_C2D("PRS_ZV", "Filtro passa faixa para impedância virtual", Zwcut/Zwr, 0, 0, 1, Zwcut, Zwr^2, 1/32, fsmp/Hz)
# MEDIÇÃO DE POTÊNCIAS  E FILTROS - DROOP
LPF1PQ_CTES := LPF1_C2D("LPF1PQ", "Filtro passa baixa para medição de potências P e Q", 1, 4, fsmp/Hz)
PI_PDROOP_CTES := PI_C2D("PI_PDROOP", "Controlador PI para Droop em P", 1/3000, 0.05, 2*π, -2*π, fsmp/Hz)
PI_C2D(PI_PDROOP, "Controlador PI para Droop em P", Kp, fz1, max, min, fs)
LPF_VREF_CTES := LPF1_C2D("LPF_VREF", "Coeficientes para filtro passa baixa de ordem 1 para referências de tensão", 1, 100, fsmp/Hz)
LPF1_CTES := LPF1_C2D("LPF1", "Filtro passa baixa genérico com fc= 1Hz ", 1, 1, fsmp/Hz)
LPF10_CTES := LPF1_C2D("LPF10", "Filtro passa baixa genérico com fc= 10Hz ", 1, 10, fsmp/Hz)
LPF100_CTES := LPF1_C2D("LPF100", "Filtro passa baixa genérico com fc= 100Hz ", 1, 100, fsmp/Hz)
LPF2_1_CTES := LPF2_C2D("LPF2_1", "Filtro passa baixa genérico segunda ordem com fc= 1 Hz ", 1, 1, 0.7, fsmp/Hz)
LPF2_10_CTES := LPF2_C2D("LPF2_10", "Filtro passa baixa genérico segunda ordem com fc= 10 Hz ", 1, 10, 0.7, fsmp/Hz)
# CIRCUITO DE SINCRONISMO PLL
PLL_CTES := PLL_C2D("PLL", "Circuito de Sincronismo PLL", 60, 12, 55, fsmp/Hz)
# O controlador do circuito de sincronismo PLL é um controlador PI. Ele tem duas funções no circuito, melhorar a resposta dinâmica e propiciar atenuação das componentes oscilantes do circuito detector de fase. Dessa forma, os parâmetros do controlador devem ser ajustados de forma a manter um compromisso em termos de tempo de resposta do circuito e igualmente em rejeição as componentes oscilantes, cuja primeira frequencia significativa refere-se a a 2° harmônico da frequência fundamental que o circuito está rastreando.
# Circuito Linearizado do PLL
# O circuito linearizado do PLL apresenta em sua FTLA o controlador PI e mais um integrador puro. Assim são definidos os parâmetros para a resposta dinâmica do circuito:
# Frequência de cruzamento da malha linearizada:
ωc_PLL := 2*π*12
# Margem de fase:
ϕPLL := 55*π/180
ωz_PLL := ωc_PLL/tan(ϕPLL)
fz_PLL := ωz_PLL/(2*π)
fz_PLL = 8.40249
KPI_PLL := |1/((ωc_PLL*1i + ωz_PLL)/(ωc_PLL*1i)^2)|
KPI_PLL = 61.7626
# Controlador PI mais integrador:
PI_PLL(s) := KPI_PLL*(s + ωz_PLL)/s
# Seja: G(s)=(b2*s^2+b1*s+b0)/(a2*s^2+a1*s+a0)
a1p := 1
a0p := 0
b1p := KPI_PLL
b0p := KPI_PLL*ωz_PLL
# Logo:
PI_PLL2(s) := (b1p*s + b0p)/(a1p*s + a0p)
FTLA_PLL(s) := PI_PLL2(s)*1/s
|FTLA_PLL(ωc_PLL*1i)| = 1
arg(FTLA_PLL(ωc_PLL*1i))*180/π = -125
MF_PLL := 180 + arg(FTLA_PLL(ωc_PLL*1i))*180/π
MF_PLL = 55
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at120 := FTLA_PLL(2*π*120)
at120 = 0.087651  # Atenuação absoluta em 120Hz
at120db := 20*log(at120)
at120db = -21.1449  # Atenuação em dB em 120Hz
# Parâmetros dos Controladores Digitais do PLL (método Tustin):
# G(z)=(B0*z+B1)/(A0*z+A1)  = (B1*z^-1+B0)/(A1*z+A0)
# Coeficientes para realização na forma Direta I ou forma Direta II
# Muito importante: Tendo em vista que o integrador possui coeficientes muito pequenos, logo o ganho de Ts/2 (equivalente à 1/m) que aparece no numerador deste será deslocado e convoluído com o ganho KPI. Assim todos os termos do numerador (B2,B1 e B0) serão multiplicados por esta constante
A0_PLL := 1
A0_PLL = 1
A1_PLL := (a0p - a1p*m)/(a1p*m + a0p)
A1_PLL = -1
B0_PLL := (b1p*m + b0p)/(a1p*m + a0p)*1/m
B0_PLL = 0.000773316
B1_PLL := (-b1p*m + b0p)/(a1p*m + a0p)*1/m
B1_PLL = -0.000772295
CI_PLL := 2*π*60*1/m
CI_PLL = 0.00471711
# Função de Transferência do Integrador
A0_INT := 1
A1_INT := 1
B0_INT := 1
B1_INT := 1
# Conferindo a função de transferência:
PI_PLLW(ω) := (B0_PLL*ω^2 + B1_PLL*ω)/(A0_PLL*ω^2 + A1_PLL*ω)
INT_PLLW(ω) := (B0_INT*ω + B1_INT)/(A0_INT*ω - A1_INT)
FTLA_PLLW(ω) := PI_PLLW(ω)*INT_PLLW(ω)
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# Algoritmo para verificação da sequência de fase:
vab(θ) := sqrt(3)*sin(θ + π/6)
vbc(θ) := sqrt(3)*sin(θ - π/2)
vα(θ) := 1/sqrt(2)*(2/sqrt(3)*vab(θ) + 1/sqrt(3)*vbc(θ))
vβ(θ) := 1/sqrt(2)*vbc(θ)
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# DEFINIÇÃO DO SISTEMA DE PARTIDA, PROTEÇÃO  E CALIBRAÇÃO DO CONVERSOR :
# SISTEMA DE PARTIDA:
VDC_REF0 := 0.9*Vgf_pk/V  # Troca do estágio 0 para 1 quando a tensão do barramento for superior a 90% da do pico da tensão de linha do lado do inversor.
VDC_REF1 := 0.9999*Vgf_pk/V*ceil(|Hvdc(0.01)|)  # Início da partida progressiva após fechar o relé. Valor inicial corresponde ao pico da tensão de linha.
VDC_REFN := Vo/V*ceil(|Hvdc(0.01)|)  # Valor final nominal em regime permanente.
t_sofstart := 0.4/Hz  # Definição do tempo de partida (da máxima de linha até a nominal), em segundos.
VDC_SSINC := (VDC_REFN - VDC_REF1)/(t_sofstart*fsmp)
VDC_SSINC =  # error: This variable is undefined.
t_rele := 0.025/Hz  # Definição do tempo de fechamento completo do rele para início da partida progressiva (em segundos).
DELAY_RELE := ceil(t_rele*fsmp) = 999
# PROTEÇÃO DO CONVERSOR :
IAC_INV_MAX := 20*ceil(|Hi(0.01)|)
IAC_RET_MAX := 20*ceil(|Hi(0.01)|)
VDC_MAX := 245*ceil(|Hvdc(0.01)|)
VAC_MAX := 1.5
# LIMITAÇÃO DOS CONTROLADORES :
# Corrente máxima para tensão nominal
iac_max := Po/Vg_rms*sqrt(2)*1.5 = 27.8351 A
# ALTERADO | iac_max
G_MAX := 20 A/(Vg_rms*sqrt(2))*Ω = 0.074227
# CALIBRAÇÃO DO CONVERSOR :
# Filtro passa baixa de segunda ordem para ajuste do offset
# Parâmetros do FPB2 (método Tustin):
# Seja: FPB2(s)=(b2*s^2+b1*s+b0)/(a2*s^2+a1*s+a0)
K_cal := 1
ξ_cal := 0.7
ωc_cal := 2*π*10
b2_cal := 0
b1_cal := 0
b0_cal := K_cal*ωc_cal^2
a2_cal := 1
a1_cal := 2*ξ_cal*ωc_cal
a0_cal := ωc_cal^2
FPB2(s) := (b2_cal*s^2 + b1_cal*s + b0_cal)/(a2_cal*s^2 + a1_cal*s + a0_cal)
# FPB2(z)=(B0*z^2+B1*z+B2)/(A0*z+A1)  = (B2*z^-2 +B1*z^-1+B0)/(A2*z^-2 +A1*z^-1+A0)
# Coeficientes para realização na forma Direta I ou forma Direta II
# Observações gerais:
A0_CAL := 1
A0_CAL = 1
A1_CAL := (2*a0_cal - 2*a2_cal*m^2)/(a2_cal*m^2 + a1_cal*m + a0_cal)
A1_CAL = -1.9978
A2_CAL := (a2_cal*m^2 - a1_cal*m + a0_cal)/(a2_cal*m^2 + a1_cal*m + a0_cal)
A2_CAL = 0.997801
B0_CAL := (b2_cal*m^2 + b1_cal*m + b0_cal)/(a2_cal*m^2 + a1_cal*m + a0_cal)
B0_CAL = 6.17406e-7
B1_CAL := (-2*b2_cal*m^2 + 2*b0_cal)/(a2_cal*m^2 + a1_cal*m + a0_cal)
B1_CAL = 1.23481e-6
B2_CAL := (b2_cal*m^2 - b1_cal*m + b0_cal)/(a2_cal*m^2 + a1_cal*m + a0_cal)
B2_CAL = 6.17406e-7
# Para Operador Delta Vem:
Δ =  # error
α0_CAL := 1
α1_CAL := (2 + A1_CAL)/Δ*α0_CAL
α2_CAL := (1 + A1_CAL + A2_CAL)/Δ^2*α0_CAL
β0_CAL := B0_CAL*α0_CAL
β1_CAL := (2*B0_CAL + B1_CAL)/Δ*α0_CAL
β2_CAL := (B0_CAL + B1_CAL + B2_CAL)/Δ^2*α0_CAL
# Conferindo as funções de transferência:
FPB2d(ω) := (B0_CAL*ω^2 + B1_CAL*ω + B2_CAL)/(A0_CAL*ω^2 + A1_CAL*ω + A2_CAL)
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# Arquivo de saída:
# Última Alteração do arquivo de saída:
# [component: outputs change]
# [component: inputs change; outputs [Dia; Mes; Ano; Hora; Minuto]]
Msubject := ["// Assunto: Constantes e definições gerais da operação do conversor para interligação com aerogerador", "", ""]
MAutoria := ["// Desenvolvimento: Márcio S. Ortmann, Dr. Eng - INEP/UFSC", "", ""]
Mlinex := ["/*****************************************************************************/", "", ""]
MLine := ["//------------------------------------------------------------------------------", "", ""]
MData := ["// Última Alteração:", concat("Dia: ", num2str(Dia), "/", num2str(Mes), "/", num2str(Ano)), concat("Horário: ", num2str(Hora), ":", num2str(Minuto))]
MHeader := stack(Mlinex, Msubject, MAutoria, MData, Mlinex)
M_DEFINE := stack(MHeader, PR1_CTES, PR5_CTES, PR7_CTES, PR11_CTES, PR13_CTES, PI1_CTES, PLL_CTES, LPF1_CTES, LPF20_CTES, PRS_ZV_CTES, LPF1PQ_CTES, PI_PDROOP_CTES, LPF_VREF_CTES, CV1_CTES, LPF1_CTES, LPF10_CTES, LPF100_CTES, BRF_CTES, PIAC_CTES, PR1i_CTES, LPF2_1_CTES, LPF2_10_CTES)
# [component: inputs M_DEFINE]
# [component: inputs M_DEFINE]
parameters := [
    "Li=", Li, "";
    "Lg=", Lg, "";
    "Ri=", Ri, "";
    "Rg=", Rg, "";
    "Cd=", Cfd, "";
    "Rd=", Rfd, "";
    "Cf=", Cf, "";
    "", "", "";
    "fs=", fsw/Hz, "";
    "fa=", fsmp/Hz, "";
    "fci=", fpci, "";
    "fcv", fpcv, "";
    "", "", "";
    "", "", ""
]
# [component: inputs parameters]
# Para inserir novas linhas, clicar na última linha/coluna e clicar em Insert Matrix. Após selecionar colocar o número de linas (Rows) e em colums colocar zero.
